// SBML level 3 version 2
// dcterms:bibliographicCitation: urn:miriam:doi:10.1371/journal.pone.0165782
// dcterms:bibliographicCitation: urn:miriam:pubmed:28152078

function Rate_Law_for_Thr_cells(sb, Ib, cb, s10, I10, c10, I2, c2, M, Ia, ca, T17, g17)
  (sb*Ib/(cb + Ib) + s10*I10/(c10 + I10))*(I2/(c2 + I2))*(M/(1 + Ia/ca))*(1/(1 + T17/g17));
end

function Rate_Law_for_Th2_cells(s4, I4, M, c4, T1, g1, Tr, gr2)
  s4*I4*M/(c4 + I4)*(1/(1 + T1/g1))*(1/(1 + Tr/gr2));
end

function Rate_Law_for_Th17_cells(s21, I21, c21, s6, I6, c6, Ib, cb, M, Ig, cg, I4, c4, Tr, gr17)
  (s21*I21/(c21 + I21) + s6*I6/(c6 + I6))*(Ib/(cb + Ib))*(M/((1 + Ig/cg)*(1 + I4/c4)))*(1/(1 + Tr/gr17));
end

function activated_first_order_reaction(sigma, act, zeta, S)
  sigma*act/(zeta + act)*S;
end

function Rate_Law_for_Differentiation(base_mac, f, delta_m_cit, cit, zet_cit)
  base_mac*(f + delta_m_cit*cit/(zet_cit + cit));
end

function Rate_Law_for_Prod_of_I10_from_Tr(v10r, n2r, I2, c2, Tr)
  v10r*(1 + n2r*(I2/(c2 + I2)))*Tr;
end

function Rate_Law_for_Prod_of_I12_from_M1(v12m, M1, I10, c10)
  v12m*M1/(1 + I10/c10);
end

function Rate_Law_for_Induction_of_T1_from_M(T2, g2, Tr, gr1, s12, I12, c12, I10, c10, M)
  s12*I12/(c12 + I12)*(1/(1 + I10/c10))*M*(1/(1 + T2/g2))*(1/(1 + Tr/gr1));
end

function Rate_Law_for_Proliferation_of_T1(s2, I2, T1, c2, T2, g2, Tr, gr1)
  s2*I2*T1/(c2 + I2)*(1/(1 + T2/g2))*(1/(1 + Tr/gr1));
end

model Lo_2016_Healthy()
  // hasVersion DOID:0050589
  // hasProperty MAMO:0000046
  // hasTaxon taxonomy:9606
  // isDescribedBy doi:10.1371/journal.pone.0165782
  // isDescribedBy pubmed:28152078
  // model units - substance: substance, time: time, volume: volume, area: area, length: length, extent: substance

  // Compartments:
  compartment compartment_0 = 1 volume;

  // Species:
  species Ig_0 in compartment_0 = 2.58e-6;  // uniprot:P01579
  species M1_0 in compartment_0 = 0.0234;  // SNOMEDCT:86373002
  species I2_0 in compartment_0 = 6.86e-8;  // uniprot:P60568
  species T1_0 in compartment_0 = 0.0458;  // CL:0000545
  species I4_0 in compartment_0 = 9.7e-9;  // uniprot:P05112
  species T2_0 in compartment_0 = 0.0134;  // CL:0000546
  species M2_0 in compartment_0 = 0.025;  // SNOMEDCT:86373002
  species I21_0 in compartment_0 = 4.25e-6;  // uniprot:Q9HBE4
  species $M_0 in compartment_0;  // SNOMEDCT:58986001; SNOMEDCT:86373002
  species I6_0 in compartment_0 = 8e-6;  // uniprot:P05231
  species Ia_0 in compartment_0 = 9.75e-6;  // hasVersion uniprot:P01375
  species T17_0 in compartment_0 = 20;  // CL:0000899
  species Tr_0 in compartment_0 = 0.0606;  // CL:0000815
  species Ib_0 in compartment_0 = 6.77e-12;  // hasVersion uniprot:P61812
  species I10_0 in compartment_0 = 1.54e-6;  // uniprot:P22301
  species I12_0 in compartment_0 = 4.9e-8;  // SNOMEDCT:6411000
  species $M0 in compartment_0 = 0.0015;  // SNOMEDCT:58986001

  // Assignment rules:
  M_0 := M1_0 + M2_0;

  // Reactions:
  Induction_of_Tr: => Tr_0; compartment_0*Rate_Law_for_Thr_cells(sb, Ib_0, Induction_of_Tr_cb, s10, I10_0, Induction_of_Tr_c10, I2_0, Induction_of_Tr_c2, M_0, Ia_0, ca, T17_0, g17);  // modifiers: Ib_0, I10_0, I2_0, M_0, Ia_0, T17_0
    sb = 14.02; Induction_of_Tr_cb = 6.77e-12; s10 = 14.02; Induction_of_Tr_c10 = 1.54e-6; Induction_of_Tr_c2 = 6.86e-8; ca = 9.75e-6; g17 = 0.337;
  Induction_of_T2: => T2_0; compartment_0*Rate_Law_for_Th2_cells(s4, I4_0, M_0, Induction_of_T2_c4, T1_0, g1, Tr_0, gr2);  // modifiers: I4_0, M_0, T1_0, Tr_0
    s4 = 1.94; Induction_of_T2_c4 = 9.7e-9; g1 = 0.183; gr2 = 0.0606;
  Induction_of_T17: => T17_0; compartment_0*Rate_Law_for_Th17_cells(s21, I21_0, c21, s6, I6_0, c6, Ib_0, Induction_of_T17_cb, M_0, Ig_0, cg, I4_0, Induction_of_T17_c4, Tr_0, gr17);  // modifiers: I21_0, I6_0, Ib_0, M_0, Ig_0, I4_0, Tr_0
    s21 = 156.17; c21 = 4.25e-6; s6 = 156.17; c6 = 8e-6; Induction_of_T17_cb = 6.77e-12; cg = 2.58e-6; Induction_of_T17_c4 = 9.7e-9; gr17 = 0.0606;
  Prod_of_Ig_from_M1: M1_0 => M1_0 + Ig_0; compartment_0*Prod_of_Ig_from_M1_k1*M1_0;
    Prod_of_Ig_from_M1_k1 = 8.2e-6;
  Prod_of_Ig_from_T1: T1_0 => T1_0 + Ig_0; compartment_0*Prod_of_Ig_from_T1_k1*T1_0;
    Prod_of_Ig_from_T1_k1 = 4.1e-5;
  Decay_of_Ig: Ig_0 => ; compartment_0*Decay_of_Ig_k1*Ig_0;
    Decay_of_Ig_k1 = 29.12;
  Prod_of_I2_from_T1: T1_0 => T1_0 + I2_0; compartment_0*Prod_of_I2_from_T1_k1*T1_0;
    Prod_of_I2_from_T1_k1 = 4.1e-5;
  Decay_of_I2: I2_0 => ; compartment_0*Decay_of_I2_k1*I2_0;
    Decay_of_I2_k1 = 537.46;
  Prof_of_I4_from_M2: M2_0 => M2_0 + I4_0; compartment_0*Prof_of_I4_from_M2_k1*M2_0;
    Prof_of_I4_from_M2_k1 = 5.83e-5;
  Prod_of_I4_from_T2: T2_0 => T2_0 + I4_0; compartment_0*Prod_of_I4_from_T2_k1*T2_0;
    Prod_of_I4_from_T2_k1 = 0.000175;
  Decay_of_I4: I4_0 => ; compartment_0*Decay_of_I4_k1*I4_0;
    Decay_of_I4_k1 = 349.37;
  Prod_of_I21_from_T17: T17_0 => T17_0 + I21_0; compartment_0*Prod_of_I21_from_T17_k1*T17_0;
    Prod_of_I21_from_T17_k1 = 0.000805;
  Decay_of_I21: I21_0 => ; compartment_0*Decay_of_I21_k1*I21_0;
    Decay_of_I21_k1 = 63.98;
  Prod_of_I6_from_M1: M1_0 => M1_0 + I6_0; compartment_0*Prod_of_I6_from_M1_k1*M1_0;
    Prod_of_I6_from_M1_k1 = 0.00363;
  Decay_of_I6: I6_0 => ; compartment_0*Decay_of_I6_k1*I6_0;
    Decay_of_I6_k1 = 29.11;
  Prod_of_Ia_from_M1: M1_0 => M1_0 + Ia_0; compartment_0*Prod_of_Ia_from_M1_k1*M1_0;
    Prod_of_Ia_from_M1_k1 = 0.021;
  Prod_of_Ia_from_T1: T1_0 => T1_0 + Ia_0; compartment_0*Prod_of_Ia_from_T1_k1*T1_0;
    Prod_of_Ia_from_T1_k1 = 0.0735;
  Decay_of_Ia: Ia_0 => ; compartment_0*Decay_of_Ia_k1*Ia_0;
    Decay_of_Ia_k1 = 388.15;
  Prod_of_Ib_from_M2: M2_0 => M2_0 + Ib_0; compartment_0*Prod_of_Ib_from_M2_k1*M2_0;
    Prod_of_Ib_from_M2_k1 = 5.6e-9;
  Prod_of_Ib_from_Tr: Tr_0 => Tr_0 + Ib_0; compartment_0*Prod_of_Ib_from_Tr_k1*Tr_0;
    Prod_of_Ib_from_Tr_k1 = 3.9e-8;
  Decay_of_Ib: Ib_0 => ; compartment_0*Decay_of_Ib_k1*Ib_0;
    Decay_of_Ib_k1 = 349.37;
  Prod_of_I10_from_M2: M2_0 => M2_0 + I10_0; compartment_0*Prod_of_I10_from_M2_k1*M2_0;
    Prod_of_I10_from_M2_k1 = 0.000372;
  Prod_of_I10_from_Tr: Tr_0 => Tr_0 + I10_0; compartment_0*Rate_Law_for_Prod_of_I10_from_Tr(v10r, n2r, I2_0, Prod_of_I10_from_Tr_c2, Tr_0);  // modifiers: I2_0
    v10r = 0.00112; n2r = 3; Prod_of_I10_from_Tr_c2 = 6.86e-8;
  Decay_of_I10: I10_0 => ; compartment_0*Decay_of_I10_k1*I10_0;
    Decay_of_I10_k1 = 116.48;
  Prod_of_I12_from_M1: M1_0 => M1_0 + I12_0; compartment_0*Rate_Law_for_Prod_of_I12_from_M1(v12m, M1_0, I10_0, Prod_of_I12_from_M1_c10);  // modifiers: I10_0
    v12m = 0.000265; Prod_of_I12_from_M1_c10 = 1.54e-6;
  Decay_of_I12: I12_0 => ; compartment_0*Decay_of_I12_k1*I12_0;
    Decay_of_I12_k1 = 8.33;
  Diff_of_M0_to_M1: $M0 => M1_0; compartment_0*Rate_Law_for_Differentiation(M0, Diff_of_M0_to_M1_f, Diff_of_M0_to_M1_delta_m_cit, Ia_0, Diff_of_M0_to_M1_zet_cit);  // modifiers: Ia_0
    Diff_of_M0_to_M1_f = 1; Diff_of_M0_to_M1_delta_m_cit = 2.4; Diff_of_M0_to_M1_zet_cit = 9.75e-6;
  Diff_of_M1_to_M2: M1_0 => M2_0; compartment_0*activated_first_order_reaction(Diff_of_M1_to_M2_sigma, Ib_0, Diff_of_M1_to_M2_zeta, M1_0);  // modifiers: Ib_0
    Diff_of_M1_to_M2_sigma = 24; Diff_of_M1_to_M2_zeta = 6.77e-12;
  Diff_of_M2_to_M1: M2_0 => M1_0; compartment_0*activated_first_order_reaction(Diff_of_M2_to_M1_sigma, Ig_0, Diff_of_M2_to_M1_zeta, M2_0);  // modifiers: Ig_0
    Diff_of_M2_to_M1_sigma = 24; Diff_of_M2_to_M1_zeta = 2.58e-6;
  Death_of_M1: M1_0 => ; compartment_0*Death_of_M1_k1*M1_0;
    Death_of_M1_k1 = 1;
  Diff_of_M0_to_M2: $M0 => M2_0; compartment_0*Rate_Law_for_Differentiation(M0, Diff_of_M0_to_M2_f, Diff_of_M0_to_M2_delta_m_cit, I10_0, Diff_of_M0_to_M2_zet_cit);  // modifiers: I10_0
    Diff_of_M0_to_M2_f = 10; Diff_of_M0_to_M2_delta_m_cit = 24; Diff_of_M0_to_M2_zet_cit = 1.54e-6;
  Death_of_M2: M2_0 => ; compartment_0*Death_of_M2_k1*M2_0;
    Death_of_M2_k1 = 1;
  Induction_of_T1_from_M: $M_0 => $M_0 + T1_0; compartment_0*Rate_Law_for_Induction_of_T1_from_M(T2_0, Induction_of_T1_from_M_g2, Tr_0, Induction_of_T1_from_M_gr1, s12, I12_0, c12, I10_0, Induction_of_T1_from_M_c10, M_0);  // modifiers: T2_0, Tr_0, I12_0, I10_0
    Induction_of_T1_from_M_g2 = 0.0535; Induction_of_T1_from_M_gr1 = 0.0606; s12 = 10.93; c12 = 4.9e-8; Induction_of_T1_from_M_c10 = 1.54e-6;
  Proliferation_of_T1: => T1_0; compartment_0*Rate_Law_for_Proliferation_of_T1(s2, I2_0, T1_0, Proliferation_of_T1_c2, T2_0, Proliferation_of_T1_g2, Tr_0, Proliferation_of_T1_gr1);  // modifiers: I2_0, T2_0, Tr_0
    s2 = 1.23; Proliferation_of_T1_c2 = 6.86e-8; Proliferation_of_T1_g2 = 0.183; Proliferation_of_T1_gr1 = 0.0606;
  Death_of_T1: T1_0 => ; compartment_0*Death_of_T1_k1*T1_0;
    Death_of_T1_k1 = 1.4;
  Death_of_T2: T2_0 => ; compartment_0*Death_of_T2_k1*T2_0;
    Death_of_T2_k1 = 1.4;
  Death_of_T17: T17_0 => ; compartment_0*Death_of_T17_k1*T17_0;
    Death_of_T17_k1 = 1.4;
  Death_of_Tr: Tr_0 => ; compartment_0*Death_of_Tr_k1*Tr_0;
    Death_of_Tr_k1 = 1.4;

  // Unit definitions:
  unit length = 1e-3 metre;
  unit area = (1e-3 metre)^2;
  unit volume = (1e-3 metre)^3;
  unit time = 86400 second;
  unit substance = mole;
end
